pi1 := 0.4
pi2 := 0.5
p2100 := 1
p1011 := 1
pxx11 := 1
p1001 := 1
px101 := 1
p1100 := 1
p2111 := 1
px100 := 1
px111 := 1
p2101 := 1
p1111 := 1
p1101 := 1
p1x11 := 1
p2001 := 1
Given
p2100 == p1001*(1 - pi2)
p1100 == p2100*pi1 + p2101*pi1*(1 - pi2)
p1001 == p2100*(1 - pi1) + p2101*(1 - pi1)*(1 - pi2)
p2101 == p1100*(1 - pi1) + p1001*pi2 + p1011*(1 - pi2) + px101*(1 - pi1)*(1 - pi2) + p1101*(1 - pi1)*(1 - pi2) + px100*(1 - pi1)
px100 == p1100*pi1 + p1101*pi1*(1 - pi2) + px101*pi1*(1 - pi2) + px100*pi1
p1101 == p2101*pi1*pi2 + p2111*pi1*(1 - pi2)
p1011 == p2101*(1 - pi1)*pi2 + p2111*(1 - pi1)*(1 - pi2)
p2111 == p1011*pi2 + p1111*(1 - pi1)*(1 - pi2) + px111*(1 - pi1)*(1 - pi2) + pxx11*(1 - pi2) + p1x11*(1 - pi2) + px101*(1 - pi1)*pi2 + p1101*(1 - pi1)*pi2
px101 == p1101*pi1*pi2 + p1111*pi1*(1 - pi2) + px111*pi1*(1 - pi2) + px101*pi1*pi2
p1x11 == p2111*(1 - pi1)*pi2
pxx11 == p1x11*pi2 + p1111*(1 - pi1)*pi2 + px111*(1 - pi1)*pi2 + pxx11*pi2
px111 == p1111*pi1*pi2 + px111*pi1*pi2
1 == p2100 + p1001 + p1100 + px100 + p2101 + p1101 + p1011 + px101 + p2111 + px111 + p1111 + p1x11 + pxx11
p1111 == p2111*pi1*pi2
probabilitiesArr := Find(p2100, p1001, p1100, px100, p2101, p1101, p1011, px101, p2111, px111, p1111, p1x11, pxx11)
sum(probabilitiesArr) = 1
Potk := 0
probabilitiesArr = [0.0451289; 0.0902579; 0.0601719; 0.0737822; 0.210602; 0.0730659; 0.109599; 0.027937; 0.154728; 0.00773639; 0.0309456; 0.0464183; 0.0696275]
Pblock := probabilitiesArr[3] + probabilitiesArr[7] + probabilitiesArr[9] + probabilitiesArr[11] + probabilitiesArr[12]
Pblock = 0.225501
A := 0.5*(1 - Pblock)
A = 0.387249
Loch := probabilitiesArr[6] + probabilitiesArr[8] + probabilitiesArr[9] + probabilitiesArr[10] + probabilitiesArr[11] + probabilitiesArr[1]
Loch = 0.439685
Ls := probabilitiesArr[0] + probabilitiesArr[1] + probabilitiesArr[2] + probabilitiesArr[3] + probabilitiesArr[4] + probabilitiesArr[5] + 2*probabilitiesArr[6] + probabilitiesArr[7] + 2*probabilitiesArr[8] + 2*probabilitiesArr[9] + 2*probabilitiesArr[10] + 2*probabilitiesArr[11] + 2*probabilitiesArr[12]
Ls = 1.41905
Ws := Ls/A
Ws = 3.66445
